*Heading
** Job name: Job-1 Model name: SEVNT2_for_gui
** Generated by: Abaqus/CAE 2020
*Preprint, echo=NO, model=NO, history=NO, contact=NO
**
** PARTS
**
*Part, name=PART-1
*Node
      1,        -17.5,   86.5132751
      2,         67.5,   86.5132751
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*Element, type=CPS4
    1,     1,    18,  2156,    52
    2,    18,    19,  2157,  2156
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*Elset, elset=SOLID, generate
     1,  22562,      1
*Nset, nset=TOP
  3,  4,  5, 36, 37, 38, 39, 40, 41, 42, 43
*Elset, elset=TOP, generate
  91,  100,    1
*Nset, nset=TR
 4,
*Nset, nset=TL
 5,
*Nset, nset=BR
 15,
*Nset, nset=MONITOR
 8,
*Nset, nset=SET-1, generate
     1,  23086,      1
*Elset, elset=SET-1, generate
     1,  22562,      1
*Nset, nset=BOTTOM
    8,   14,   15,   16,  255,  256
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*Elset, elset=BOTTOM
   383,   425,   426,   427,  1002,  1022
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*Nset, nset=NOTCH
    8,   10,   11,   12,  122,  123
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*Elset, elset=NOTCH
   222,   230,   234,   243,   244,   248
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*End Part
**
**
** ASSEMBLY
**
*Assembly, name=Assembly
**
*Instance, name=PART-1-1, part=PART-1
*End Instance
**
*Nset, nset=Monitor-1, instance=PART-1-1
 8,
*Elset, elset=_Surf-1_S3, internal, instance=PART-1-1, generate
  91,  100,    1
*Surface, type=ELEMENT, name=Surf-1
_Surf-1_S3, S3
*Elset, elset=_Surf-2_S2, internal, instance=PART-1-1
   425, 19668, 20510, 20668, 20703
*Elset, elset=_Surf-2_S3, internal, instance=PART-1-1
   426, 21768
*Elset, elset=_Surf-2_S4, internal, instance=PART-1-1
   383,   427,  1002,  1022,  1042,  1062
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*Surface, type=ELEMENT, name=Surf-2
_Surf-2_S2, S2
_Surf-2_S3, S3
_Surf-2_S4, S4
*Elset, elset=_Surf-3_S4, internal, instance=PART-1-1
 427,
*Surface, type=ELEMENT, name=Surf-3
_Surf-3_S4, S4
*Elset, elset=_Surf-4_S4, internal, instance=PART-1-1
 91,
*Surface, type=ELEMENT, name=Surf-4
_Surf-4_S4, S4
*Elset, elset=_Surf-5_S2, internal, instance=PART-1-1
 100,
*Surface, type=ELEMENT, name=Surf-5
_Surf-5_S2, S2
*End Assembly
*Amplitude, name=AMP-1
             0.,            850.,      100000000.,            850.
**
** MATERIALS
**
** **********************************************
**
**  MATERIALS
**
*Material, name=MATERIAL-1
*Depvar
     18,
*User Material, constants=0
**
** BOUNDARY CONDITIONS
**
** Name: Disp-BC-1 Type: Displacement/Rotation
*Boundary
PART-1-1.BOTTOM, 2, 2
** Name: Disp-BC-2 Type: Displacement/Rotation
*Boundary
PART-1-1.BR, 1, 1
** ----------------------------------------------------------------
**
** STEP: Step-1
**
*Step, name=Step-1, nlgeom=NO, extrapolation=NO, inc=2147483647
*Static, direct
1e-07, 1.,
*Solution Technique, type=QUASI-NEWTON, reform kernel=25
**
** LOADS
**
** Name: CFORCE-1   Type: Concentrated force
*Cload, amplitude=AMP-1
PART-1-1.TL, 2, -0.5
** Name: CFORCE-2   Type: Concentrated force
*Cload, amplitude=AMP-1
PART-1-1.TR, 2, -0.5
** Name: CFORCE-3   Type: Concentrated force
*Cload, amplitude=AMP-1
PART-1-1.TOP, 2, 1.
**
** CONTROLS
**
*Controls, reset
*Controls, parameters=time incrementation
10000, 10000, 8000, 12000, 500, 5, , , , ,
*Controls, parameters=line search
, , , ,
**
** OUTPUT REQUESTS
**
*Restart, write, frequency=0
*Monitor, dof=4, node=Monitor-1, frequency=1
**
** FIELD OUTPUT: F-Output-1
**
*Output, field, frequency=100
*Node Output
U, UR
*Output, history, frequency=0
*End Step
