*Heading
** Job name: singleNotchTension Model name: singleNotchTension
** Generated by: Abaqus/CAE 2020
*Preprint, echo=NO, model=NO, history=NO, contact=NO
**
** PARTS
**
*Part, name=Part-1
*Node
      1,           1.,  0.400000006
      2,           0.,  0.400000006
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*Element, type=CPS4R
   1,    1,   25, 2386,  160
   2,   25,   26, 2387, 2386
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*End Part
**
**
** ASSEMBLY
**
*Assembly, name=Assembly
**
*Instance, name=Part-1-1, part=Part-1
*End Instance
**
*Nset, nset=Set-1, instance=Part-1-1
   7,   8, 229, 230, 231, 232
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*Elset, elset=Set-1, instance=Part-1-1, generate
 1951,  2000,     1
*Nset, nset=Set-2, instance=Part-1-1
   3,   4,  93,  94,  95,  96
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*Elset, elset=Set-2, instance=Part-1-1, generate
  951,  1000,     1
*Nset, nset=Set-3, instance=Part-1-1
    1,    2,    3,    4,    5,    6
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*Elset, elset=Set-3, instance=Part-1-1
     1,    50,    51,   100,   101,   150
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*Nset, nset=Set-4, instance=Part-1-1
   7,   8, 229, 230, 231, 232
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*Elset, elset=Set-4, instance=Part-1-1, generate
 1951,  2000,     1
*Nset, nset=Set-5, instance=Part-1-1
   3,   4,   7,   8,  93,  94
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*Elset, elset=Set-5, instance=Part-1-1
  951,  952,  953,  954,  955,  956
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*End Assembly
** ----------------------------------------------------------------
**
** STEP: Step-1
**
*Step, name=Step-1, nlgeom=NO
*Static
1., 1., 1e-05, 1.
**
** BOUNDARY CONDITIONS
**
** Name: BC-1 Type: Displacement/Rotation
*Boundary
Set-1, 2, 2, 1.
** Name: BC-2 Type: Displacement/Rotation
*Boundary
Set-2, 2, 2
** Name: BC-4 Type: Displacement/Rotation
*Boundary
Set-4, 1, 1
**
** OUTPUT REQUESTS
**
*Restart, write, frequency=0
**
** FIELD OUTPUT: F-Output-1
**
*Output, field, variable=PRESELECT
**
** HISTORY OUTPUT: H-Output-1
**
*Output, history, variable=PRESELECT
*End Step
